*Heading
** Job name: LaserCladding-Single Model name: Model-1
** Generated by: Abaqus/CAE 2025
*Preprint, echo=NO, model=NO, history=NO, contact=NO
**
** PARTS
**
*Part, name=Part-1
*End Part
**
**
** ASSEMBLY
**
*Assembly, name=Assembly
**
*Instance, name=Part-1-1, part=Part-1
*Node
      1, 0.00400000019, 0.00300000003,           0.
      2, 0.00200000009, 0.00300000003,           0.
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*Element, type=DC3D8
  1,   30,  457,   17,    1,  976, 3325,  747,  148
  2,  457,  458,   18,   17, 3325, 3326,  746,  747
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*Nset, nset=All, generate
     1,  10578,      1
*Elset, elset=All, generate
    1,  8960,     1
** Section: SolidSection
*Solid Section, elset=All, material=Material-1
,
*End Instance
**
*Nset, nset=All-Cells, instance=Part-1-1, generate
     1,  10578,      1
*Elset, elset=All-Cells, instance=Part-1-1, generate
    1,  8960,     1
*Elset, elset=All-Elements, instance=Part-1-1, generate
    1,  8960,     1
*Nset, nset=All-External-Faces, instance=Part-1-1, generate
    1,  3324,     1
*Elset, elset=All-External-Faces, instance=Part-1-1
    1,    2,    3,    4,    5,    6
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*Elset, elset=Set-Kill, instance=Part-1-1, generate
   1,  560,    1
*Elset, elset=Set-Layer-001, instance=Part-1-1, generate
   1,  14,   1
*Elset, elset=Set-Layer-002, instance=Part-1-1, generate
  15,  28,   1
*Elset, elset=Set-Layer-003, instance=Part-1-1, generate
  29,  42,   1
*Elset, elset=Set-Layer-004, instance=Part-1-1, generate
  43,  56,   1
*Elset, elset=Set-Layer-005, instance=Part-1-1, generate
  57,  70,   1
*Elset, elset=Set-Layer-006, instance=Part-1-1, generate
  71,  84,   1
*Elset, elset=Set-Layer-007, instance=Part-1-1, generate
  85,  98,   1
*Elset, elset=Set-Layer-008, instance=Part-1-1, generate
  99, 112,   1
*Elset, elset=Set-Layer-009, instance=Part-1-1, generate
 113, 126,   1
*Elset, elset=Set-Layer-010, instance=Part-1-1, generate
 127, 140,   1
*Elset, elset=Set-Layer-011, instance=Part-1-1, generate
 141, 154,   1
*Elset, elset=Set-Layer-012, instance=Part-1-1, generate
 155, 168,   1
*Elset, elset=Set-Layer-013, instance=Part-1-1, generate
 169, 182,   1
*Elset, elset=Set-Layer-014, instance=Part-1-1, generate
 183, 196,   1
*Elset, elset=Set-Layer-015, instance=Part-1-1, generate
 197, 210,   1
*Elset, elset=Set-Layer-016, instance=Part-1-1, generate
 211, 224,   1
*Elset, elset=Set-Layer-017, instance=Part-1-1, generate
 225, 238,   1
*Elset, elset=Set-Layer-018, instance=Part-1-1, generate
 239, 252,   1
*Elset, elset=Set-Layer-019, instance=Part-1-1, generate
 253, 266,   1
*Elset, elset=Set-Layer-020, instance=Part-1-1, generate
 267, 280,   1
*Elset, elset=Set-Layer-021, instance=Part-1-1, generate
 281, 294,   1
*Elset, elset=Set-Layer-022, instance=Part-1-1, generate
 295, 308,   1
*Elset, elset=Set-Layer-023, instance=Part-1-1, generate
 309, 322,   1
*Elset, elset=Set-Layer-024, instance=Part-1-1, generate
 323, 336,   1
*Elset, elset=Set-Layer-025, instance=Part-1-1, generate
 337, 350,   1
*Elset, elset=Set-Layer-026, instance=Part-1-1, generate
 351, 364,   1
*Elset, elset=Set-Layer-027, instance=Part-1-1, generate
 365, 378,   1
*Elset, elset=Set-Layer-028, instance=Part-1-1, generate
 379, 392,   1
*Elset, elset=Set-Layer-029, instance=Part-1-1, generate
 393, 406,   1
*Elset, elset=Set-Layer-030, instance=Part-1-1, generate
 407, 420,   1
*Elset, elset=Set-Layer-031, instance=Part-1-1, generate
 421, 434,   1
*Elset, elset=Set-Layer-032, instance=Part-1-1, generate
 435, 448,   1
*Elset, elset=Set-Layer-033, instance=Part-1-1, generate
 449, 462,   1
*Elset, elset=Set-Layer-034, instance=Part-1-1, generate
 463, 476,   1
*Elset, elset=Set-Layer-035, instance=Part-1-1, generate
 477, 490,   1
*Elset, elset=Set-Layer-036, instance=Part-1-1, generate
 491, 504,   1
*Elset, elset=Set-Layer-037, instance=Part-1-1, generate
 505, 518,   1
*Elset, elset=Set-Layer-038, instance=Part-1-1, generate
 519, 532,   1
*Elset, elset=Set-Layer-039, instance=Part-1-1, generate
 533, 546,   1
*Elset, elset=Set-Layer-040, instance=Part-1-1, generate
 547, 560,   1
*Elset, elset=_Surf-All-External_S5, internal, instance=Part-1-1
    1,    2,    3,    4,    5,    6
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*Elset, elset=_Surf-All-External_S1, internal, instance=Part-1-1
    1,    2,    3,    4,    5,    6
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*Elset, elset=_Surf-All-External_S4, internal, instance=Part-1-1
    7,   14,   21,   28,   35,   42
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*Elset, elset=_Surf-All-External_S3, internal, instance=Part-1-1
    8,    9,   10,   11,   12,   13
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*Elset, elset=_Surf-All-External_S6, internal, instance=Part-1-1
    1,    8,   15,   22,   29,   36
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*Elset, elset=_Surf-All-External_S2, internal, instance=Part-1-1
  547,  548,  549,  550,  551,  552
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*Surface, type=ELEMENT, name=Surf-All-External
_Surf-All-External_S5, S5
_Surf-All-External_S1, S1
_Surf-All-External_S4, S4
_Surf-All-External_S6, S6
_Surf-All-External_S2, S2
_Surf-All-External_S3, S3
*End Assembly
**
** MATERIALS
**
*Material, name=Material-1
*Conductivity
 13.1,  10.
  14., 100.
  23., 300.
  36., 500.
  38., 800.
  35.,1200.
  70.,1350.
 100.,1450.
 130.,1800.
 170.,3000.
*Density
7740.,  10.
7710., 100.
7680., 300.
7580., 500.
7470., 800.
7350.,1200.
7000.,1500.
*Latent Heat
270000., 1384.85, 1446.85
*Specific Heat
450.,  10.
500., 100.
650., 300.
750., 500.
850., 800.
780.,1200.
920.,1500.
**
** PHYSICAL CONSTANTS
**
*Physical Constants, absolute zero=-273.15, stefan boltzmann=5.67037e-08
**
** PREDEFINED FIELDS
**
** Name: Initial-Temp   Type: Temperature
*Initial Conditions, type=TEMPERATURE
All-Cells, 20.
** ----------------------------------------------------------------
**
** STEP: Step-1
**
*Step, name=Step-1, nlgeom=NO, inc=1000000
*Heat Transfer, end=PERIOD, deltmx=200.
1e-08, 1e-08, 1e-11, 1e-08,
*Model Change, remove
Set-Kill
**
** OUTPUT REQUESTS
**
*Restart, write, frequency=0
**
** FIELD OUTPUT: F-Output-1
**
*Output, field, variable=PRESELECT
*Output, history, frequency=0
*End Step
**
** STEP: Step-2
**
*Step, name=Step-2, nlgeom=NO, inc=1000000
*Heat Transfer, end=PERIOD, deltmx=50.
0.012, 0.06, 2e-06, 0.03,
*Model Change, add
Set-Layer-001
**
** LOADS
**
*Dflux
All-Elements, BFNU, 1.
**
** INTERACTIONS
**
*Sfilm
Surf-All-External, F, 20., 20.
*Sradiate
Surf-All-External, R, 20., 0.85
*End Step
**
** STEP: Step-3
**
*Step, name=Step-3, nlgeom=NO, inc=1000000
*Heat Transfer, end=PERIOD, deltmx=50.
0.012, 0.06, 2e-06, 0.03,
*Model Change, add
Set-Layer-002
**
** LOADS
**
*Dflux
All-Elements, BFNU, 1.
**
** INTERACTIONS
**
*Sfilm
Surf-All-External, F, 20., 20.
*Sradiate
Surf-All-External, R, 20., 0.85
*End Step
**
** STEP: Step-4
**
*Step, name=Step-4, nlgeom=NO, inc=1000000
*Heat Transfer, end=PERIOD, deltmx=50.
0.012, 0.06, 2e-06, 0.03,
*Model Change, add
Set-Layer-003
**
** LOADS
**
*Dflux
All-Elements, BFNU, 1.
**
** INTERACTIONS
**
*Sfilm
Surf-All-External, F, 20., 20.
*Sradiate
Surf-All-External, R, 20., 0.85
*End Step
**
** STEP: Step-5
**
*Step, name=Step-5, nlgeom=NO, inc=1000000
*Heat Transfer, end=PERIOD, deltmx=50.
0.012, 0.06, 2e-06, 0.03,
*Model Change, add
Set-Layer-004
**
** LOADS
**
*Dflux
All-Elements, BFNU, 1.
**
** INTERACTIONS
**
*Sfilm
Surf-All-External, F, 20., 20.
*Sradiate
Surf-All-External, R, 20., 0.85
*End Step
**
** STEP: Step-6
**
*Step, name=Step-6, nlgeom=NO, inc=1000000
*Heat Transfer, end=PERIOD, deltmx=50.
0.012, 0.06, 2e-06, 0.03,
*Model Change, add
Set-Layer-005
**
** LOADS
**
*Dflux
All-Elements, BFNU, 1.
**
** INTERACTIONS
**
*Sfilm
Surf-All-External, F, 20., 20.
*Sradiate
Surf-All-External, R, 20., 0.85
*End Step
**
** STEP: Step-7
**
*Step, name=Step-7, nlgeom=NO, inc=1000000
*Heat Transfer, end=PERIOD, deltmx=50.
0.012, 0.06, 2e-06, 0.03,
*Model Change, add
Set-Layer-006
**
** LOADS
**
*Dflux
All-Elements, BFNU, 1.
**
** INTERACTIONS
**
*Sfilm
Surf-All-External, F, 20., 20.
*Sradiate
Surf-All-External, R, 20., 0.85
*End Step
**
** STEP: Step-8
**
*Step, name=Step-8, nlgeom=NO, inc=1000000
*Heat Transfer, end=PERIOD, deltmx=50.
0.012, 0.06, 2e-06, 0.03,
*Model Change, add
Set-Layer-007
**
** LOADS
**
*Dflux
All-Elements, BFNU, 1.
**
** INTERACTIONS
**
*Sfilm
Surf-All-External, F, 20., 20.
*Sradiate
Surf-All-External, R, 20., 0.85
*End Step
**
** STEP: Step-9
**
*Step, name=Step-9, nlgeom=NO, inc=1000000
*Heat Transfer, end=PERIOD, deltmx=50.
0.012, 0.06, 2e-06, 0.03,
*Model Change, add
Set-Layer-008
**
** LOADS
**
*Dflux
All-Elements, BFNU, 1.
**
** INTERACTIONS
**
*Sfilm
Surf-All-External, F, 20., 20.
*Sradiate
Surf-All-External, R, 20., 0.85
*End Step
**
** STEP: Step-10
**
*Step, name=Step-10, nlgeom=NO, inc=1000000
*Heat Transfer, end=PERIOD, deltmx=50.
0.012, 0.06, 2e-06, 0.03,
*Model Change, add
Set-Layer-009
**
** LOADS
**
*Dflux
All-Elements, BFNU, 1.
**
** INTERACTIONS
**
*Sfilm
Surf-All-External, F, 20., 20.
*Sradiate
Surf-All-External, R, 20., 0.85
*End Step
**
** STEP: Step-11
**
*Step, name=Step-11, nlgeom=NO, inc=1000000
*Heat Transfer, end=PERIOD, deltmx=50.
0.012, 0.06, 2e-06, 0.03,
*Model Change, add
Set-Layer-010
**
** LOADS
**
*Dflux
All-Elements, BFNU, 1.
**
** INTERACTIONS
**
*Sfilm
Surf-All-External, F, 20., 20.
*Sradiate
Surf-All-External, R, 20., 0.85
*End Step
**
** STEP: Step-12
**
*Step, name=Step-12, nlgeom=NO, inc=1000000
*Heat Transfer, end=PERIOD, deltmx=50.
0.012, 0.06, 2e-06, 0.03,
*Model Change, add
Set-Layer-011
**
** LOADS
**
*Dflux
All-Elements, BFNU, 1.
**
** INTERACTIONS
**
*Sfilm
Surf-All-External, F, 20., 20.
*Sradiate
Surf-All-External, R, 20., 0.85
*End Step
**
** STEP: Step-13
**
*Step, name=Step-13, nlgeom=NO, inc=1000000
*Heat Transfer, end=PERIOD, deltmx=50.
0.012, 0.06, 2e-06, 0.03,
*Model Change, add
Set-Layer-012
**
** LOADS
**
*Dflux
All-Elements, BFNU, 1.
**
** INTERACTIONS
**
*Sfilm
Surf-All-External, F, 20., 20.
*Sradiate
Surf-All-External, R, 20., 0.85
*End Step
**
** STEP: Step-14
**
*Step, name=Step-14, nlgeom=NO, inc=1000000
*Heat Transfer, end=PERIOD, deltmx=50.
0.012, 0.06, 2e-06, 0.03,
*Model Change, add
Set-Layer-013
**
** LOADS
**
*Dflux
All-Elements, BFNU, 1.
**
** INTERACTIONS
**
*Sfilm
Surf-All-External, F, 20., 20.
*Sradiate
Surf-All-External, R, 20., 0.85
*End Step
**
** STEP: Step-15
**
*Step, name=Step-15, nlgeom=NO, inc=1000000
*Heat Transfer, end=PERIOD, deltmx=50.
0.012, 0.06, 2e-06, 0.03,
*Model Change, add
Set-Layer-014
**
** LOADS
**
*Dflux
All-Elements, BFNU, 1.
**
** INTERACTIONS
**
*Sfilm
Surf-All-External, F, 20., 20.
*Sradiate
Surf-All-External, R, 20., 0.85
*End Step
**
** STEP: Step-16
**
*Step, name=Step-16, nlgeom=NO, inc=1000000
*Heat Transfer, end=PERIOD, deltmx=50.
0.012, 0.06, 2e-06, 0.03,
*Model Change, add
Set-Layer-015
**
** LOADS
**
*Dflux
All-Elements, BFNU, 1.
**
** INTERACTIONS
**
*Sfilm
Surf-All-External, F, 20., 20.
*Sradiate
Surf-All-External, R, 20., 0.85
*End Step
**
** STEP: Step-17
**
*Step, name=Step-17, nlgeom=NO, inc=1000000
*Heat Transfer, end=PERIOD, deltmx=50.
0.012, 0.06, 2e-06, 0.03,
*Model Change, add
Set-Layer-016
**
** LOADS
**
*Dflux
All-Elements, BFNU, 1.
**
** INTERACTIONS
**
*Sfilm
Surf-All-External, F, 20., 20.
*Sradiate
Surf-All-External, R, 20., 0.85
*End Step
**
** STEP: Step-18
**
*Step, name=Step-18, nlgeom=NO, inc=1000000
*Heat Transfer, end=PERIOD, deltmx=50.
0.012, 0.06, 2e-06, 0.03,
*Model Change, add
Set-Layer-017
**
** LOADS
**
*Dflux
All-Elements, BFNU, 1.
**
** INTERACTIONS
**
*Sfilm
Surf-All-External, F, 20., 20.
*Sradiate
Surf-All-External, R, 20., 0.85
*End Step
**
** STEP: Step-19
**
*Step, name=Step-19, nlgeom=NO, inc=1000000
*Heat Transfer, end=PERIOD, deltmx=50.
0.012, 0.06, 2e-06, 0.03,
*Model Change, add
Set-Layer-018
**
** LOADS
**
*Dflux
All-Elements, BFNU, 1.
**
** INTERACTIONS
**
*Sfilm
Surf-All-External, F, 20., 20.
*Sradiate
Surf-All-External, R, 20., 0.85
*End Step
**
** STEP: Step-20
**
*Step, name=Step-20, nlgeom=NO, inc=1000000
*Heat Transfer, end=PERIOD, deltmx=50.
0.012, 0.06, 2e-06, 0.03,
*Model Change, add
Set-Layer-019
**
** LOADS
**
*Dflux
All-Elements, BFNU, 1.
**
** INTERACTIONS
**
*Sfilm
Surf-All-External, F, 20., 20.
*Sradiate
Surf-All-External, R, 20., 0.85
*End Step
**
** STEP: Step-21
**
*Step, name=Step-21, nlgeom=NO, inc=1000000
*Heat Transfer, end=PERIOD, deltmx=50.
0.012, 0.06, 2e-06, 0.03,
*Model Change, add
Set-Layer-020
**
** LOADS
**
*Dflux
All-Elements, BFNU, 1.
**
** INTERACTIONS
**
*Sfilm
Surf-All-External, F, 20., 20.
*Sradiate
Surf-All-External, R, 20., 0.85
*End Step
**
** STEP: Step-22
**
*Step, name=Step-22, nlgeom=NO, inc=1000000
*Heat Transfer, end=PERIOD, deltmx=50.
0.012, 0.06, 2e-06, 0.03,
*Model Change, add
Set-Layer-021
**
** LOADS
**
*Dflux
All-Elements, BFNU, 1.
**
** INTERACTIONS
**
*Sfilm
Surf-All-External, F, 20., 20.
*Sradiate
Surf-All-External, R, 20., 0.85
*End Step
**
** STEP: Step-23
**
*Step, name=Step-23, nlgeom=NO, inc=1000000
*Heat Transfer, end=PERIOD, deltmx=50.
0.012, 0.06, 2e-06, 0.03,
*Model Change, add
Set-Layer-022
**
** LOADS
**
*Dflux
All-Elements, BFNU, 1.
**
** INTERACTIONS
**
*Sfilm
Surf-All-External, F, 20., 20.
*Sradiate
Surf-All-External, R, 20., 0.85
*End Step
**
** STEP: Step-24
**
*Step, name=Step-24, nlgeom=NO, inc=1000000
*Heat Transfer, end=PERIOD, deltmx=50.
0.012, 0.06, 2e-06, 0.03,
*Model Change, add
Set-Layer-023
**
** LOADS
**
*Dflux
All-Elements, BFNU, 1.
**
** INTERACTIONS
**
*Sfilm
Surf-All-External, F, 20., 20.
*Sradiate
Surf-All-External, R, 20., 0.85
*End Step
**
** STEP: Step-25
**
*Step, name=Step-25, nlgeom=NO, inc=1000000
*Heat Transfer, end=PERIOD, deltmx=50.
0.012, 0.06, 2e-06, 0.03,
*Model Change, add
Set-Layer-024
**
** LOADS
**
*Dflux
All-Elements, BFNU, 1.
**
** INTERACTIONS
**
*Sfilm
Surf-All-External, F, 20., 20.
*Sradiate
Surf-All-External, R, 20., 0.85
*End Step
**
** STEP: Step-26
**
*Step, name=Step-26, nlgeom=NO, inc=1000000
*Heat Transfer, end=PERIOD, deltmx=50.
0.012, 0.06, 2e-06, 0.03,
*Model Change, add
Set-Layer-025
**
** LOADS
**
*Dflux
All-Elements, BFNU, 1.
**
** INTERACTIONS
**
*Sfilm
Surf-All-External, F, 20., 20.
*Sradiate
Surf-All-External, R, 20., 0.85
*End Step
**
** STEP: Step-27
**
*Step, name=Step-27, nlgeom=NO, inc=1000000
*Heat Transfer, end=PERIOD, deltmx=50.
0.012, 0.06, 2e-06, 0.03,
*Model Change, add
Set-Layer-026
**
** LOADS
**
*Dflux
All-Elements, BFNU, 1.
**
** INTERACTIONS
**
*Sfilm
Surf-All-External, F, 20., 20.
*Sradiate
Surf-All-External, R, 20., 0.85
*End Step
**
** STEP: Step-28
**
*Step, name=Step-28, nlgeom=NO, inc=1000000
*Heat Transfer, end=PERIOD, deltmx=50.
0.012, 0.06, 2e-06, 0.03,
*Model Change, add
Set-Layer-027
**
** LOADS
**
*Dflux
All-Elements, BFNU, 1.
**
** INTERACTIONS
**
*Sfilm
Surf-All-External, F, 20., 20.
*Sradiate
Surf-All-External, R, 20., 0.85
*End Step
**
** STEP: Step-29
**
*Step, name=Step-29, nlgeom=NO, inc=1000000
*Heat Transfer, end=PERIOD, deltmx=50.
0.012, 0.06, 2e-06, 0.03,
*Model Change, add
Set-Layer-028
**
** LOADS
**
*Dflux
All-Elements, BFNU, 1.
**
** INTERACTIONS
**
*Sfilm
Surf-All-External, F, 20., 20.
*Sradiate
Surf-All-External, R, 20., 0.85
*End Step
**
** STEP: Step-30
**
*Step, name=Step-30, nlgeom=NO, inc=1000000
*Heat Transfer, end=PERIOD, deltmx=50.
0.012, 0.06, 2e-06, 0.03,
*Model Change, add
Set-Layer-029
**
** LOADS
**
*Dflux
All-Elements, BFNU, 1.
**
** INTERACTIONS
**
*Sfilm
Surf-All-External, F, 20., 20.
*Sradiate
Surf-All-External, R, 20., 0.85
*End Step
**
** STEP: Step-31
**
*Step, name=Step-31, nlgeom=NO, inc=1000000
*Heat Transfer, end=PERIOD, deltmx=50.
0.012, 0.06, 2e-06, 0.03,
*Model Change, add
Set-Layer-030
**
** LOADS
**
*Dflux
All-Elements, BFNU, 1.
**
** INTERACTIONS
**
*Sfilm
Surf-All-External, F, 20., 20.
*Sradiate
Surf-All-External, R, 20., 0.85
*End Step
**
** STEP: Step-32
**
*Step, name=Step-32, nlgeom=NO, inc=1000000
*Heat Transfer, end=PERIOD, deltmx=50.
0.012, 0.06, 2e-06, 0.03,
*Model Change, add
Set-Layer-031
**
** LOADS
**
*Dflux
All-Elements, BFNU, 1.
**
** INTERACTIONS
**
*Sfilm
Surf-All-External, F, 20., 20.
*Sradiate
Surf-All-External, R, 20., 0.85
*End Step
**
** STEP: Step-33
**
*Step, name=Step-33, nlgeom=NO, inc=1000000
*Heat Transfer, end=PERIOD, deltmx=50.
0.012, 0.06, 2e-06, 0.03,
*Model Change, add
Set-Layer-032
**
** LOADS
**
*Dflux
All-Elements, BFNU, 1.
**
** INTERACTIONS
**
*Sfilm
Surf-All-External, F, 20., 20.
*Sradiate
Surf-All-External, R, 20., 0.85
*End Step
**
** STEP: Step-34
**
*Step, name=Step-34, nlgeom=NO, inc=1000000
*Heat Transfer, end=PERIOD, deltmx=50.
0.012, 0.06, 2e-06, 0.03,
*Model Change, add
Set-Layer-033
**
** LOADS
**
*Dflux
All-Elements, BFNU, 1.
**
** INTERACTIONS
**
*Sfilm
Surf-All-External, F, 20., 20.
*Sradiate
Surf-All-External, R, 20., 0.85
*End Step
**
** STEP: Step-35
**
*Step, name=Step-35, nlgeom=NO, inc=1000000
*Heat Transfer, end=PERIOD, deltmx=50.
0.012, 0.06, 2e-06, 0.03,
*Model Change, add
Set-Layer-034
**
** LOADS
**
*Dflux
All-Elements, BFNU, 1.
**
** INTERACTIONS
**
*Sfilm
Surf-All-External, F, 20., 20.
*Sradiate
Surf-All-External, R, 20., 0.85
*End Step
**
** STEP: Step-36
**
*Step, name=Step-36, nlgeom=NO, inc=1000000
*Heat Transfer, end=PERIOD, deltmx=50.
0.012, 0.06, 2e-06, 0.03,
*Model Change, add
Set-Layer-035
**
** LOADS
**
*Dflux
All-Elements, BFNU, 1.
**
** INTERACTIONS
**
*Sfilm
Surf-All-External, F, 20., 20.
*Sradiate
Surf-All-External, R, 20., 0.85
*End Step
**
** STEP: Step-37
**
*Step, name=Step-37, nlgeom=NO, inc=1000000
*Heat Transfer, end=PERIOD, deltmx=50.
0.012, 0.06, 2e-06, 0.03,
*Model Change, add
Set-Layer-036
**
** LOADS
**
*Dflux
All-Elements, BFNU, 1.
**
** INTERACTIONS
**
*Sfilm
Surf-All-External, F, 20., 20.
*Sradiate
Surf-All-External, R, 20., 0.85
*End Step
**
** STEP: Step-38
**
*Step, name=Step-38, nlgeom=NO, inc=1000000
*Heat Transfer, end=PERIOD, deltmx=50.
0.012, 0.06, 2e-06, 0.03,
*Model Change, add
Set-Layer-037
**
** LOADS
**
*Dflux
All-Elements, BFNU, 1.
**
** INTERACTIONS
**
*Sfilm
Surf-All-External, F, 20., 20.
*Sradiate
Surf-All-External, R, 20., 0.85
*End Step
**
** STEP: Step-39
**
*Step, name=Step-39, nlgeom=NO, inc=1000000
*Heat Transfer, end=PERIOD, deltmx=50.
0.012, 0.06, 2e-06, 0.03,
*Model Change, add
Set-Layer-038
**
** LOADS
**
*Dflux
All-Elements, BFNU, 1.
**
** INTERACTIONS
**
*Sfilm
Surf-All-External, F, 20., 20.
*Sradiate
Surf-All-External, R, 20., 0.85
*End Step
**
** STEP: Step-40
**
*Step, name=Step-40, nlgeom=NO, inc=1000000
*Heat Transfer, end=PERIOD, deltmx=50.
0.012, 0.06, 2e-06, 0.03,
*Model Change, add
Set-Layer-039
**
** LOADS
**
*Dflux
All-Elements, BFNU, 1.
**
** INTERACTIONS
**
*Sfilm
Surf-All-External, F, 20., 20.
*Sradiate
Surf-All-External, R, 20., 0.85
*End Step
**
** STEP: Step-41
**
*Step, name=Step-41, nlgeom=NO, inc=1000000
*Heat Transfer, end=PERIOD, deltmx=50.
0.012, 0.06, 2e-06, 0.03,
*Model Change, add
Set-Layer-040
**
** LOADS
**
*Dflux
All-Elements, BFNU, 1.
**
** INTERACTIONS
**
*Sfilm
Surf-All-External, F, 20., 20.
*Sradiate
Surf-All-External, R, 20., 0.85
*End Step
